// SBML level 3 version 2

model ERModule()

  // Compartments:
  compartment cell = 1 MWBUILTINUNIT_liter;

  // Species:
  species cell_TIP_er in cell = 0;  // substance in MWDERIVEDUNIT_nanomolarity_liter
  substanceOnly species cell_A_er in cell = 0;  // substance in dimensionless
  substanceOnly species cell_X_er in cell = 0;  // substance in dimensionless
  substanceOnly species cell_R_imm in cell = 0;  // substance in dimensionless
  substanceOnly species cell_R_mat in cell = 0;  // substance in dimensionless

  // Parameters:
  S_er = 100 MWBUILTINPREFIX_micro_MWBUILTINUNIT_molarity;
  // CALIBRATED: Hill fit to 4 Pincus peak-splicing dose points (1500/2200/3300/5000 uM). Analogous to Delaunay Fig.2C densitometry for ox, independent of beta_basal/beta_max. CAVEAT: 1500uM ("<10%") and 5000uM ("saturation") response values were estimated from paper text, not read precisely from a figure -- verify if more precise numbers available.
  K_act_er = 2345.3 MWBUILTINPREFIX_micro_MWBUILTINUNIT_molarity;
  // CALIBRATED: same fit as K_act_er, resnorm=0.0103. Independently confirms earlier hand-calculated estimate (2.7-5.7 range from Pincus 4-point analysis).
  n_er = 3.97 dimensionless;
  beta_basal_er = 0.77 MWDERIVEDUNIT_nanomolarity__hour;
  beta_max_er = 25 MWDERIVEDUNIT_nanomolarity__hour;
  k_deg_TIP = 1 MWDERIVEDUNIT_1__hour;
  mu = 0.35 MWDERIVEDUNIT_1__hour;
  // PENDING - fit from Pincus 2010 HAC1 splicing Northern blot time course, Step 6-7
  k_on_er = 7.2 MWDERIVEDUNIT_1__hour;
  // PENDING - same source
  k_off_er = 11.09 MWDERIVEDUNIT_1__hour;
  // FIXED BY CONSTRUCTION - normalization constant (structural non-identifiability with k_off/d_x), never fit, see identifiability check Step 8
  k_x_er = 1 MWDERIVEDUNIT_1__hour;
  // PENDING - same source. OPEN QUESTION: linear decay dX/dt=k_x*A-d_x*X gives only PARTIAL adaptation (dose-dependent steady state), not perfect adaptation. Marifylli flagged same issue for ox module. Digitized Pincus Fig1C data (Step 6) shows NEAR-perfect adaptation (1.5mM: 6.3% at 240min, 2.2mM: 7.8% at 240min) - small residual difference, check if linear model reproduces this or needs saturating form.
  d_x_er = 0 MWDERIVEDUNIT_1__hour;
  // Reused from Khmelinskii 2012 tandem timer kinetics (mCherry maturation half-time T=47min total, per papers own convention M=ln(2)/m). Consistent with Fisher model k_gfp/k_mch.
  k_mat_er = 0.8848687 MWDERIVEDUNIT_1__hour;

  // Rate rules:
  cell_A_er' = k_on_er*(S_er^n_er/(K_act_er^n_er + S_er^n_er))*(1 - cell_A_er) - k_off_er*cell_A_er*cell_X_er;
  cell_X_er' = k_x_er*cell_A_er - d_x_er*cell_X_er;
  cell_R_imm' = beta_basal_er + (beta_max_er - beta_basal_er)*cell_A_er - k_mat_er*cell_R_imm - mu*cell_R_imm;
  cell_R_mat' = k_mat_er*cell_R_imm - mu*cell_R_mat;

  // Reactions:
  Reaction_1: => cell_TIP_er; (beta_basal_er + (beta_max_er - beta_basal_er)*cell_A_er)*cell;  // modifiers: cell_A_er
  Reaction_2: cell_TIP_er => ; (k_deg_TIP + mu)*cell_TIP_er*cell;

  // Unit definitions:
  unit MWBUILTINUNIT_liter = metre^3 * 1e-3 dimensionless;
  unit MWBUILTINPREFIX_nano_MWBUILTINUNIT_molarity = mole * 1e-6 dimensionless / metre^3; MWBUILTINPREFIX_nano_MWBUILTINUNIT_molarity is "nanomolarity";
  unit MWDERIVEDUNIT_nanomolarity_liter = 1e-9 mole; MWDERIVEDUNIT_nanomolarity_liter is "(nanomolarity)*(liter)";
  unit MWBUILTINPREFIX_micro_MWBUILTINUNIT_molarity = mole * 1e-3 dimensionless / metre^3; MWBUILTINPREFIX_micro_MWBUILTINUNIT_molarity is "micromolarity";
  unit MWDERIVEDUNIT_nanomolarity__hour = mole * 2.777778e-10 dimensionless / (metre^3 * second); MWDERIVEDUNIT_nanomolarity__hour is "nanomolarity/hour";
  unit MWDERIVEDUNIT_1__hour = 2.777778e-4 dimensionless / second; MWDERIVEDUNIT_1__hour is "1/hour";
end
