// SBML level 3 version 2

model OxidativeModule()

  // Compartments:
  compartment cell = 1 MWBUILTINUNIT_liter;

  // Species:
  species cell_TIP_ox in cell = beta_basal_ox/(k_deg_TIP + mu);  // substance in MWDERIVEDUNIT_nanomolarity_liter

  // Parameters:
  S_ox = 400 MWBUILTINPREFIX_micro_MWBUILTINUNIT_molarity;
  K_act_ox = 208 MWBUILTINPREFIX_micro_MWBUILTINUNIT_molarity;
  n_ox = 2.75 dimensionless;
  beta_basal_ox = 5 MWDERIVEDUNIT_nanomolarity__hour;
  beta_max_ox = 118 MWDERIVEDUNIT_nanomolarity__hour;
  k_deg_TIP = 1 MWDERIVEDUNIT_1__hour;
  mu = 0.35 MWDERIVEDUNIT_1__hour;
  k_on_ox = 50 MWDERIVEDUNIT_1__hour;
  k_off_ox = 160 MWDERIVEDUNIT_1__hour;
  k_x_ox = 1 MWDERIVEDUNIT_1__hour;
  d_x_ox = 0.5 MWDERIVEDUNIT_1__hour;
  A_ox = 0 dimensionless;
  X_ox = 0 dimensionless;

  // Rate rules:
  A_ox' = k_on_ox*((S_ox/K_act_ox)^n_ox/(1 + (S_ox/K_act_ox)^n_ox))*(1 - A_ox) - k_off_ox*A_ox*X_ox;
  X_ox' = k_x_ox*A_ox - d_x_ox*X_ox;

  // Reactions:
  Reaction_1: => cell_TIP_ox; (beta_basal_ox + (beta_max_ox - beta_basal_ox)*A_ox)*cell;
  Reaction_2: cell_TIP_ox => ; (k_deg_TIP + mu)*cell_TIP_ox*cell;

  // Unit definitions:
  unit MWBUILTINUNIT_liter = metre^3 * 1e-3 dimensionless;
  unit MWBUILTINPREFIX_nano_MWBUILTINUNIT_molarity = mole * 1e-6 dimensionless / metre^3; MWBUILTINPREFIX_nano_MWBUILTINUNIT_molarity is "nanomolarity";
  unit MWDERIVEDUNIT_nanomolarity_liter = 1e-9 mole; MWDERIVEDUNIT_nanomolarity_liter is "(nanomolarity)*(liter)";
  unit MWBUILTINPREFIX_micro_MWBUILTINUNIT_molarity = mole * 1e-3 dimensionless / metre^3; MWBUILTINPREFIX_micro_MWBUILTINUNIT_molarity is "micromolarity";
  unit MWDERIVEDUNIT_nanomolarity__hour = mole * 2.777778e-10 dimensionless / (metre^3 * second); MWDERIVEDUNIT_nanomolarity__hour is "nanomolarity/hour";
  unit MWDERIVEDUNIT_1__hour = 2.777778e-4 dimensionless / second; MWDERIVEDUNIT_1__hour is "1/hour";
end
